boundary          p p m
units             lj
atom_modify       sort 0 1.0

lattice           sc 10.0
region            cell block  0 1  0 1  0 1
create_box        1 cell
mass              1 1.0
create_atoms      1 box

variable          nsteps equal 3000
variable          x0 equal -0.5
variable          step equal 0.001

displace_atoms    all move 0.0 0.0 0.5 units box

pair_style        none

#fix               rigid all contact/map input64.matrix 1.0 1 lj93 0.351364184463153 1.16499305075071 1.05 # k = 10, r0 = 1
#fix               rigid all contact/map input64.matrix 1.0 1 lj93/smooth 1.0 1.0 1.5 2.0
fix               rigid all contact/map flat 1.0 1 lj93/smooth 0.035136418446315326 1.1649930507507130 1.0 1.3464101615137753
#fix               rigid all contact/map input64.matrix 2.0 1 expf 0.1 0.01 1.0
fix_modify        rigid energy yes

variable          x equal ${x0}
compute           force all reduce sum fz
thermo            100
thermo_style      custom step v_x pe f_rigid[3] c_force
thermo_modify     format float "%14.8f" norm no

label loop
variable i loop 1 ${nsteps}

  displace_atoms  all move 0.0 0.0 ${step} units box
  variable        x equal ${x0}+$i*${step}
  run             1

next i
jump SELF loop
